** Job name: UmatJob Model name: Model-1
** Generated by: Abaqus/CAE 6.14-1
**
** PARTS
**
*Node
      1,           0.,           0.
      2,  0.100000001,           0.
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*User element, nodes=4,type=U1, properties=5,coordinates=2, variables=320
1,2
*Element, type=U1
  1,   1,   2,  13,  12
  2,   2,   3,  14,  13
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*Nset, nset=N1, generate
   1,  121,    1
*Elset, elset=E1, generate
   1,  100,    1
** Section: Section-1
**
**
** ASSEMBLY
**
**
**
*Nset, nset=_PickedSet5, generate
  1,  11,   1
*Elset, elset=_PickedSet5, generate
  1,  10,   1
*Elset, elset=__PickedSurf4_S3, generate
  91,  100,    1
*Uel property, elset=E1
100000.,0.3,300000.,30.,0.00001

**
** MATERIALS
**
**
** BOUNDARY CONDITIONS
**
** Name: BC-1 Type: Displacement/Rotation
*Boundary
_PickedSet5, 1, 1
_PickedSet5, 2, 2
** ----------------------------------------------------------------
**
** STEP: Step-1
**
*Step, name=Step-1, nlgeom=NO, inc=1000, unsymm=YES
*Static
0.01, 1., 1e-05, 1.
**
** LOADS
**
** Name: Load-1   Type: Pressure
*cload
111, 2, -1e+03
112, 2, -1e+03
113, 2, -1e+03
114, 2, -1e+03
115, 2, -1e+03
116, 2, -1e+03
117, 2, -1e+03
118, 2, -1e+03
119, 2, -1e+03
120, 2, -1e+03
121, 2, -1e+03
**
** OUTPUT REQUESTS
**
*Restart, write, frequency=0
**
** FIELD OUTPUT: F-Output-1
**
*Output, field
*Node Output
CF, RF, U
*el file,elset=E1
sdv
**
** HISTORY OUTPUT: H-Output-1
**
*End Step
